# INSTITUTO FEDERAL  DE SANTA CATARINA
# UNIDADE CURRICULAR: ELETRÔNICA I
# PROFESSOR: MÁRCIO S. ORTMANN
# ALUNO: NATÁLIA BESEN
# Projeto de Fonte Linear de Alimentação
#
# 1- Aspectos gerais do trabalho:
# 1.1-Especificações técnicas básicas:
# - Corrente de saída: 1 A
# - Rede Elétrica: 220 V +- 10% , 60 Hz
# - Ondulação da tensão de saída a plena carga: <5 %
# - Regulação da tensão de saída: <3 %
# - Tensão de saída : 12V
# -
# 1.2-Metodologia
#
# Uma fonte linear pode ser observada como um conjunto de blocos, cada um responsável por uma função para obter o resultado final desejado. Nesse projeto cada bloco será analisado e projetado da seguinte forma:
# - Escolha da topologia utilizada
# - Análise teórica
# - Escolha dos componentes
# - Simulação do circuito
# - Comparação dos resultados
# Para a etapa de simulação será utilizado o software LTspice e com o intuito de obter resultados mais realistas será adicionado o modelo spice dos componentes utilizados.
# Ao fim do projeto de todos os blocos a  fonte será analisada como um todo e será possível concluir se o resultados desejado foi obtido e todas as especificações técnicas foram cumpridas.
# 2- Concepção geral da fonte
# Uma fonte linear é composta basicamente por 4 blocos, o primeiro é o transformador que é o responsável por reduzir a tensão da rede elétrica para uma tensão mais próxima da saída da fonte desejada. O bloco seguinte é o retificador, que transforma a tensão de entrada senoidal em uma tensão contínua pulsante, para reduzir a pulsação e a ondulação da tensão de saída do retificador utiliza-se o próximo bloco, chamado filtro. Por fim, o útimo bloco que torna a tensão adequada para a saída da fonte linear é o regulador.
# Diagrama em blocos mostrando os estágios de uma fonte de alimentação
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# Fonte: Boylestad, 11° edição.
# 3-Dados de entrada
#
# A seguir serão definidas as variáveis com os dados de entrada, as quais serão utilizadas ao longo do projeto.
Vp := 220*V  # Tensão RMS nominal no primário
Vpmin := 220*(1 - 10%)*V = 198 V  # Tensão RMS mínima no primário
Vpmax := 220*(1 + 10%)*V = 242 V  # Tensão RMS máxima no primário
f := 60 Hz  # Frequência da tensão no primário
Vo := 12 V  # Tensão nominal média de saída
Io := 1 A  # Corrente nominal de saída
# 4-Projeto dos circuitos
# 4.1 - Especificação do transformador:
# Para determinar a tensão que será necessária no secundário do tranformador, soma-se
# a tensão de saída desejada a todas as quedas de tensão nos blocos entre secundário e saída , para o pior caso. Como ponto inicial, considera-se uma queda nominal de 4 V sobre o regulador, mais a queda do(s) diodos, mais a queda no filtro.
VR := 4 V  # Tensão nominal média sobre o regulador
VD := 0.7 V  # Tensão média sobre os diodos
VFac := Vo*5% = 0.6 V  # Tensão ac no filtro
FT := 1.1  # Fator de compensão do trafo para compensar queda de tensão quando carregado
Vspico := (Vo + VR + VD + VFac/2)*FT = 18.7 V
Vs := Vspico/sqrt(2) = 13.2229 V
# A tensão nominal do secundário é definida então com base nos valores comerciais e/ou disponíveis. Exemplo:
Vs := 15 V  # Tensão RMS nominal no secundário
a := Vp/Vs = 14.6667  # Relação de espiras
Vsmin := Vpmin/a = 13.5 V  # Tensão RMS mínima no secundário
Vsmax := Vpmax/a = 16.5 V  # Tensão RMS máxima no secundário
# 4.2-Projeto do retificador
#
# O retificador de onda completa com ponto médio foi a topologia escolhida para utilização no projeto, dentre os motivos para a escolha desse retificador estão sua simplicidade de execução, menor quantidade de componentes e menor queda na tensão do secundário em relação a topologia em ponte.
# Para o projeto do retificador será utilizada uma carga de 15 ohms, com corrente RMS de aproximadamete 1A em tensão nominal, para representar o circuito da fonte e a carga nominal que serão conectados no retificador posteriormente. A análise será realizada para a maior tensão de pico do primário, pois assim obtem-se os esforços elétricos e térmicos dos diodos para o pior caso.
# Retificador de onda completa com ponto médio sem filtro
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# - Análise teórica:
Vsmax_pico := Vsmax*sqrt(2) = 23.3345 V  # Tensão de pico no secundário
Vret_pico := Vsmax_pico - VD = 22.6345 V  # Tensão de pico na saída do retificador
Vret_rms := Vret_pico/sqrt(2) = 16.005 V  # Tensão RMS na saída do retificador
w := 2*π*60
Vret_med := 1/π*integral(Vret_pico*sin(wt), wt = 0 .. π)
Vret_med = 14.4096 V  # Tensão média na saída do retificador
Rl := 15 ohm
Il_med := Vret_med/Rl = 0.960639 A  # Corrente média na carga
ID_med := Il_med/2 = 0.48032 A  # Corrente média nos diodos
PIV := 2*Vsmax_pico - VD = 45.969 V  # Tensão de pico inversa nos diodos
PD := ID_med*VD = 0.336224 W  # Potência média dissipada em cada diodo
Ptotal := 2*PD = 0.672447 W  # Potência média dissipada no retificador
# - Escolha dos componentes:
# A partir dos resultados obtidos na análise teórica é possível selecionar um modelo adequado para os diodos. O diodo escolhido foi o 1N4007, pois de acordo com seu datasheet ele suporta a tensão de pico inversa, corrente média e potência média necessárias para o funcionamento do projeto.
# - Resultados da simulação:
# Tensão Retificada na carga
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# Tensão de pico na carga
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# Corrente nos diodos
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# Corrente de pico nos diodos | Corrente média nos diodos
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# Tensão nos diodos
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# Tensão de pico inversa nos diodos | Tensão direta nos diodos
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# Potência disssipada
ID_med := 465.36*10^-3 A
PD := VD*ID_med = 0.325752 W
VD := 924.91*10^-3 V
Ptotal := 2*PD = 0.651504 W
# 4.3-Projeto do Filtro
#
# O filtro utilizado será do tipo C, pois ele apresenta bons resultados e não gera perdas. Para essa etapa não há especificações pré-definidas para o fator de ondulação, portanto será considerado um fator de ondulação de até 10% após o filtro para o calculo da capacitância. Novamente será utilizada a tensão máxima do primário para os cálculos, pois é necessário encontrar a tensão máxima sobre o capacitor para dimensiona-lo.
# - Análise teórica:
# De acordo com o livro do Boylestad o fator de ondulação é:
#
# Considerando Icc em miliampéres, C em microfarads, Vcc em Volts e Rl em kilo-ohms. Portanto :
#
# Considerando Rl em ohms e C em Farads.
# Como Vcc é aproximadamente igual a Vpico, a tensão de ripple é:
#
# A tensão máxima sobre o capacitor será:
#
# Vale lembrar que o aumento da capacitância de filtro propicia uma menor ondulação, porém aumenta a corrente de pico dos diodos retificadores.
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r := 10
C := 2.4*10^-3/(Rl*r)*100*(C/A) = 0.0016 F
Rl := 15 ohm
Vr_rms := Vsmax*sqrt(2)*r/100 = 2.33345 V
VC := Vsmax*sqrt(2) - VD = 22.4096 V
# - Escolha dos componentes:
# O capacitância obtida na análise teórica foi 2000uF, portanto será escolhido um capacitor eletrolítico com valor comercial mais próximo e que suporte a tensão máxima obtida. Nesse caso o capacitor eletrolítico utilizado será de 2200uF e 25V.
# Quanto ao aumento da corrente da corrente de pico nos diodos, o modelo 1N4007 utilizado é capaz de suportar um surto de corrente de até 30A, como a corrente nos diodos não será tão elevada o modelo escolhido continua sendo adequado.
# - Resultados da simulação:
# Retificador de onda completa com ponto médio com filtro capacitivo
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# Tensão na saída do retificador com filtro
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# Tensão máxima no capacitor | Tensão de ripple na saída do retificador
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# Corrente nos diodos
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# Corrente de pico nos diodos
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# 4.4-Projeto do Regulador
#
# 4.4.1- Circuito gerador da tensão de referência
#
# O componente responsável por gerar uma tensão de referência será o diodo zener, porém sabe-se que em um zener real possui uma resistência interna e que sua tensão varia de acordo com a corrente que passa por ele. Como a tensão no primário do transformador possui uma variação significativa um circuito comum de referência composto apenas por resistor e zener, como mostrado na figura abaixo, resultaria em uma variação na corrente do zener e consequentemente na sua tensão.
#
# Circuito de tensão de referência simples
#
# Para reduzir a variação na tensão de referência,  será adicionado um circuito de fonte de corrente constante ao zener. A topologia utilizada utiliza dois transistores PNP como mostra a figura abaixo:
#
# Circuito de fonte de corrente melhorado
#
# O funcionamento da fonte de corrente é muito simples, devido a tensão VBE de Q1 a queda de tensão em R1 será sempre 0.7V independemente de Vcc. R2 deve possuir resistência elevada e portanto baixa corrente, assim as tensões de base dos transistores são aproximadamente zero e a corrente em R1 é igual a corrente de saída.
# Sendo assim, o circuito completo de tensão de referência utilizado será:
# Circuito de tensão de referência completo
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# - Análise teórica:
# A tensão de zener nominal do diodo utilizado será 6.8V, por motivos explicados posteriormente, para esse modelo, de acordo com o datasheet, a corrente deve estar entre 0.25m e 20m. A corrente escolhida para que o zener opere adequadamente será de aproximadamente 5mA, pois quanto menor a corrente menor será a queda de tensão na resistência interna do zener.
Vz := 6.8 V  # Tensão nominal no zener
Iz := 5*10^-3 A  # Corrente no zener
Pz := Vz*Iz = 0.034 W  # Potência dissipada no zener
VBE := 0.7 V  # Vbe dos transistores
R2 := 10*10^3 ohm  # R2 da fonte de corrente
R1 := VBE/Iz = 140 Ω  # R1 da fonte de corrente
VCE_Q2 := Vz - (Vsmax*sqrt(2) - VD)
VCE_Q2 = -15.6096 V  # Tensão VCE máxima no transistor Q2
# - Escolha dos componentes:
# Analisando o datasheet dos diodos zener do 1N5225 até 1N5267, o diodo 1N5235 de 6.8V foi escolhido, pois é o que possui a menor resistência interna.
#
# O modelo selecionado para os transistores PNP Q1 e Q2 é o BC559 que é apresenta máxima tensão de VCE  maior que a necessária e possui baixa corrente de coletor de 100mA que é suficiente para a corrente utilizada no circuito.
# Além disso também foi escolhido um valor comercial para o resitor R1 próximo ao calculado, sua resistência será 130ohms.
# Parte do datasheet dos diodos zener
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# - Resultado simulado:
# Circuito para referência de tensão com os componentes selecionados
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# Tensão no zener para tensão mínima no primário
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# Tensão média no zener
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# Corrente no zener para tensão mínima no primário
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# Corrente média no zener
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# Tensão no zener para tensão máxima no primário
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# Tensão média no zener
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# Corrente no zener para tensão máxima no primário
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# Corrente média no zener
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# Como observa-se a variação na tensão e corrente de zener é muito pequena mesmo com a variação da tensão do primário do transformador.
# Tensão VCE no transistor Q2  para tensão máxima no primário
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# Tensão VCE máxima no transistor Q2
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# 4.4.2- Circuito de controle com amplificador operacional
#
# O circuito de controle é um ampop responsável por comparar a tensão de referência do diodo Zener com a tensão de realimentação fornecida pelo circuito de amostragem. O modelo do ampop escolhido foi o LM324.
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# 4.4.3-Circuito de amostragem da tensão de saída
#
# O circuito de amostragem é composto por dois resistores que fazem a realimentação do ampop e são responsáveis pelo ganho do mesmo.
#
# - Análise teórica:
Vo := 12 V
Vz := 6.8 V
# O circuito de amostragem estará conectado a entrada inversora do ampop e o zener a entrada não inversora, uma das principais características do ampop e manter sua tensão de entrada inversora e não inversora iguais, portanto:
Vz
# =
Vo*R2/(R1 + R2)
# Foram escolhidos os resistores R1 e R2 comerciais que melhor atenderam a equação, R1=1.2kohm e R2=1.5kohm.
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R1 := 1.2*10^3*ohm
R2 := 1.5*10^3*ohm
Vo := Vz*(R1 + R2)/R2 = 12.24 V
# 4.4.4-Dispositivo de regulação
#
# O disposistivo de regulação será um transistor NPN , quando há variação na tensão de saída ele é responsável por controlar sua condução para manter a tensão de saída constante. O transistor escolhido foi o BC137, pois ele suporta a corrente de carga de 1A sobre ele.
# 5-Análise final da fonte
# Fonte concluída - Transformador, retificador e filtro
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# Fonte concluída - Regulador Linear
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# - Simulações
# Saída da fonte sem carga tensão mínima no primário
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# Tensão de ondulação | Tensão média e RMS na saída
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# Saída da fonte sem carga tensão máxima no primário
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# Tensão de ondulação | Tensão média e RMS na saída
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# Com carga nominal de 12ohm:
# Saída da fonte com carga tensão mínima no primário
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# Tensão de ondulação | Tensão média e RMS na saída
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# Saída da fonte com carga tensão máxima no primário
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# Tensão de ondulação | Tensão média e RMS na saída
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# Regulação da Tensão de saída para tensão mínima de entrada:
Vo := 12.174 V
Vl := 12.173 V
Rt := (Vo - Vl)/Vl = 8.2149e-5
# A partir da simulações conclui-se que a fonte projetada está de acordo com o desejado e cumpre as especificações, possui tensão de ondulação menor que 5% e Regulação de tensão menor que 3%.
